# OpenSim document version 40000
InverseKinematicsTool gait_2:
  model_file: D:\Academic\Codes\Python\MRR\Qualisys_OpenSim\Data\001_test\2022-09-02_shoe\output\calibrated.osim
  time_range: 0 100
  output_motion_file: D:\Academic\Codes\Python\MRR\Qualisys_OpenSim\Data\001_test\2022-09-02_shoe\output\gait_2_inverse_kinematics.mot
  report_errors: true
  marker_file: D:\Academic\Codes\Python\MRR\Qualisys_OpenSim\Data\001_test\2022-09-02_shoe\output\gait_2_marker.trc
  IKTaskSet:
    IKMarkerTask RACR: apply=true weight=2
    IKMarkerTask LACR: apply=true weight=2
    IKMarkerTask C7: apply=true weight=2
    IKMarkerTask CLAV: apply=true weight=1
    IKMarkerTask RLEL: apply=true weight=1
    IKMarkerTask RFAradius: apply=true weight=1
    IKMarkerTask LLEL: apply=true weight=1
    IKMarkerTask LFAradius: apply=true weight=1
    IKMarkerTask RASI: apply=true weight=9
    IKMarkerTask LASI: apply=true weight=9
    IKMarkerTask RPSI: apply=true weight=9
    IKMarkerTask LPSI: apply=true weight=9
    IKMarkerTask LHJC: apply=false weight=1
    IKMarkerTask RHJC: apply=false weight=1
    IKMarkerTask RTH1: apply=true weight=3
    IKMarkerTask RTH2: apply=true weight=3
    IKMarkerTask RTH3: apply=true weight=3
    IKMarkerTask RTH4: apply=true weight=3
    IKMarkerTask RLFC: apply=true weight=3
    IKMarkerTask RTB1: apply=true weight=3
    IKMarkerTask RTB2: apply=true weight=3
    IKMarkerTask RTB3: apply=true weight=3
    IKMarkerTask RTB4: apply=true weight=3
    IKMarkerTask RLMAL: apply=true weight=3
    IKMarkerTask RCAL: apply=true weight=3
    IKMarkerTask RTOE: apply=true weight=3
    IKMarkerTask RMT5: apply=true weight=3
    IKMarkerTask LTH1: apply=true weight=3
    IKMarkerTask LTH2: apply=true weight=3
    IKMarkerTask LTH3: apply=true weight=3
    IKMarkerTask LTH4: apply=true weight=3
    IKMarkerTask LLFC: apply=true weight=3
    IKMarkerTask LTB1: apply=true weight=3
    IKMarkerTask LTB2: apply=true weight=3
    IKMarkerTask LTB3: apply=true weight=3
    IKMarkerTask LTB4: apply=true weight=3
    IKMarkerTask LLMAL: apply=true weight=3
    IKMarkerTask LCAL: apply=true weight=3
    IKMarkerTask LTOE: apply=true weight=3
    IKMarkerTask LMT5: apply=true weight=3
