# OpenSim document version 40000
ForceSet actuators:
  CoordinateActuator pelvis_tilt_moment: coordinate=pelvis_tilt optimal_force=200
  CoordinateActuator pelvis_list_moment: coordinate=pelvis_list optimal_force=200
  CoordinateActuator pelvis_rotation_moment: coordinate=pelvis_rotation optimal_force=200
  CoordinateActuator pelvis_tx_force: coordinate=pelvis_tx optimal_force=200
  CoordinateActuator pelvis_ty_force: coordinate=pelvis_ty optimal_force=200
  CoordinateActuator pelvis_tz_force: coordinate=pelvis_tz optimal_force=200
  CoordinateActuator hip_flexion_r_moment: coordinate=hip_flexion_r optimal_force=2.5
  CoordinateActuator hip_adduction_r_moment: coordinate=hip_adduction_r optimal_force=5
  CoordinateActuator hip_rotation_r_moment: coordinate=hip_rotation_r optimal_force=10
  CoordinateActuator knee_angle_r_moment: coordinate=knee_angle_r optimal_force=2.5
  CoordinateActuator knee_angle_r_beta_force: coordinate=knee_angle_r_beta optimal_force=2.5
  CoordinateActuator ankle_angle_r_moment: coordinate=ankle_angle_r optimal_force=2.5
  CoordinateActuator subtalar_angle_r_moment: coordinate=subtalar_angle_r optimal_force=1
  CoordinateActuator mtp_angle_r_moment: coordinate=mtp_angle_r optimal_force=1
  CoordinateActuator hip_flexion_l_moment: coordinate=hip_flexion_l optimal_force=2.5
  CoordinateActuator hip_adduction_l_moment: coordinate=hip_adduction_l optimal_force=5
  CoordinateActuator hip_rotation_l_moment: coordinate=hip_rotation_l optimal_force=10
  CoordinateActuator knee_angle_l_moment: coordinate=knee_angle_l optimal_force=2.5
  CoordinateActuator knee_angle_l_beta_force: coordinate=knee_angle_l_beta optimal_force=2.5
  CoordinateActuator ankle_angle_l_moment: coordinate=ankle_angle_l optimal_force=2.5
  CoordinateActuator subtalar_angle_l_moment: coordinate=subtalar_angle_l optimal_force=1
  CoordinateActuator mtp_angle_l_moment: coordinate=mtp_angle_l optimal_force=1
  CoordinateActuator lumbar_extension_moment: coordinate=lumbar_extension optimal_force=1
  CoordinateActuator lumbar_bending_moment: coordinate=lumbar_bending optimal_force=1
  CoordinateActuator lumbar_rotation_moment: coordinate=lumbar_rotation optimal_force=1
  CoordinateActuator arm_flex_r_moment: coordinate=arm_flex_r optimal_force=1
  CoordinateActuator arm_add_r_moment: coordinate=arm_add_r optimal_force=1
  CoordinateActuator arm_rot_r_moment: coordinate=arm_rot_r optimal_force=1
  CoordinateActuator elbow_flex_r_moment: coordinate=elbow_flex_r optimal_force=1
  CoordinateActuator pro_sup_r_moment: coordinate=pro_sup_r optimal_force=1
  CoordinateActuator wrist_flex_r_moment: coordinate=wrist_flex_r optimal_force=1
  CoordinateActuator wrist_dev_r_moment: coordinate=wrist_dev_r optimal_force=1
  CoordinateActuator arm_flex_l_moment: coordinate=arm_flex_l optimal_force=1
  CoordinateActuator arm_add_l_moment: coordinate=arm_add_l optimal_force=1
  CoordinateActuator arm_rot_l_moment: coordinate=arm_rot_l optimal_force=1
  CoordinateActuator elbow_flex_l_moment: coordinate=elbow_flex_l optimal_force=1
  CoordinateActuator pro_sup_l_moment: coordinate=pro_sup_l optimal_force=1
  CoordinateActuator wrist_flex_l_moment: coordinate=wrist_flex_l optimal_force=1
  CoordinateActuator wrist_dev_l_moment: coordinate=wrist_dev_l optimal_force=1
