# OpenSim document version 40000
ScaleTool:
  mass: 61.7 [kg]
  height: 1795
  age: 29
  GenericModelMaker:
    model_file: D:\Academic\Codes\Python\MRR\Qualisys_OpenSim\Templates\Rajagopal2015_passiveCal_hipAbdMoved.osim
    marker_set_file: D:\Academic\Codes\Python\MRR\Qualisys_OpenSim\Templates\setupMarkers.xml
  ModelScaler:
    apply: true
    scaling_order: measurements
    marker_file: D:\Academic\Codes\Python\MRR\Qualisys_OpenSim\Data\001_test\2022-09-02_shoe\output\static_1_marker.trc
    time_range: 0 10
    preserve_mass_distribution: true
    MeasurementSet:
      Measurement pelvis: apply=true
        MarkerPair: markers=(RHJC LHJC)
        BodyScale pelvis: axes=(X Y Z)
      Measurement thigh: apply=true
        MarkerPair: markers=(RHJC RKJC)
        MarkerPair: markers=(LHJC LKJC)
        BodyScale femur_r: axes=(X Y Z)
        BodyScale patella_r: axes=(X Y Z)
        BodyScale femur_l: axes=(X Y Z)
        BodyScale patella_l: axes=(X Y Z)
      Measurement shank: apply=true
        MarkerPair: markers=(RKJC RAJC)
        MarkerPair: markers=(LKJC LAJC)
        BodyScale tibia_r: axes=(X Y Z)
        BodyScale tibia_l: axes=(X Y Z)
      Measurement foot: apply=true
        MarkerPair: markers=(RCAL RTOE)
        MarkerPair: markers=(LCAL LTOE)
        BodyScale talus_r: axes=(X Y Z)
        BodyScale calcn_r: axes=(X Y Z)
        BodyScale toes_r: axes=(X Y Z)
        BodyScale talus_l: axes=(X Y Z)
        BodyScale calcn_l: axes=(X Y Z)
        BodyScale toes_l: axes=(X Y Z)
      Measurement torso: apply=true
        MarkerPair: markers=(RPSI RACR)
        MarkerPair: markers=(LPSI LACR)
        BodyScale torso: axes=(X Y Z)
      Measurement forearm: apply=true
        MarkerPair: markers=(RLEL RFAradius)
        MarkerPair: markers=(LLEL LFAradius)
        BodyScale ulna_r: axes=(X Y Z)
        BodyScale radius_r: axes=(X Y Z)
        BodyScale hand_r: axes=(X Y Z)
        BodyScale ulna_l: axes=(X Y Z)
        BodyScale radius_l: axes=(X Y Z)
        BodyScale hand_l: axes=(X Y Z)
      Measurement arm: apply=true
        MarkerPair: markers=(RACR RLEL)
        MarkerPair: markers=(LACR LLEL)
        BodyScale humerus_r: axes=(X Y Z)
        BodyScale humerus_l: axes=(X Y Z)
  MarkerPlacer:
    apply: true
    marker_file: D:\Academic\Codes\Python\MRR\Qualisys_OpenSim\Data\001_test\2022-09-02_shoe\output\static_1_marker.trc
    time_range: 0 10
    output_motion_file: D:\Academic\Codes\Python\MRR\Qualisys_OpenSim\Data\001_test\2022-09-02_shoe\output\static_1_static_position.mot
    output_model_file: D:\Academic\Codes\Python\MRR\Qualisys_OpenSim\Data\001_test\2022-09-02_shoe\output\scaled.osim
    max_marker_movement: -1
    IKTaskSet:
      IKMarkerTask RACR: apply=true weight=1
      IKMarkerTask LACR: apply=true weight=1
      IKMarkerTask C7: apply=true weight=3
      IKMarkerTask CLAV: apply=true weight=1
      IKMarkerTask RLEL: apply=true weight=1
      IKMarkerTask RFAradius: apply=true weight=1
      IKMarkerTask LLEL: apply=true weight=1
      IKMarkerTask LFAradius: apply=true weight=1
      IKMarkerTask RASI: apply=true weight=1
      IKMarkerTask LASI: apply=true weight=1
      IKMarkerTask RPSI: apply=true weight=1
      IKMarkerTask LPSI: apply=true weight=1
      IKMarkerTask LHJC: apply=true weight=10
      IKMarkerTask RHJC: apply=true weight=10
      IKMarkerTask RLFC: apply=true weight=1
      IKMarkerTask RMFC: apply=true weight=1
      IKMarkerTask RKJC: apply=true weight=10
      IKMarkerTask RLMAL: apply=true weight=1
      IKMarkerTask RMMAL: apply=true weight=1
      IKMarkerTask RAJC: apply=true weight=10
      IKMarkerTask RCAL: apply=true weight=1
      IKMarkerTask RTOE: apply=true weight=1
      IKMarkerTask RMT5: apply=true weight=1
      IKMarkerTask LLFC: apply=true weight=1
      IKMarkerTask LMFC: apply=true weight=1
      IKMarkerTask LKJC: apply=true weight=10
      IKMarkerTask LLMAL: apply=true weight=1
      IKMarkerTask LMMAL: apply=true weight=1
      IKMarkerTask LAJC: apply=true weight=10
      IKMarkerTask LCAL: apply=true weight=1
      IKMarkerTask LTOE: apply=true weight=1
      IKMarkerTask LMT5: apply=true weight=1
      IKCoordinateTask pelvis_list: apply=true weight=0.1 value_type=default_value value=0
      IKCoordinateTask pelvis_rotation: apply=true weight=0.1 value_type=default_value value=0
      IKCoordinateTask lumbar_bending: apply=true weight=0.1 value_type=default_value value=0
      IKCoordinateTask lumbar_rotation: apply=true weight=0.1 value_type=default_value value=0
