# OpenSim document version 40000
MarkerSet:
  Marker RACR: torso (-0.003 0.425 0.13)
  Marker LACR: torso (-0.003 0.425 -0.13)
  Marker C7: torso (-0.085 0.435 0.00165426)
  Marker CLAV: torso (0.04 0.38 0.017)
  Marker RLEL: humerus_r (-0.0009073087 -0.28 0.02630935)
  Marker RFAradius: radius_r (0.0005 -0.2296971 0.04714702)
  Marker LLEL: humerus_l (-0.0009073087 -0.28 -0.02630935)
  Marker LFAradius: radius_l (0.0005 -0.2296971 -0.04714702)
  Marker RASI: pelvis (0.00953047 0.0180816 0.128464)
  Marker LASI: pelvis (0.00953047 0.0180816 -0.128464)
  Marker RPSI: pelvis (-0.155 0.035 0.045)
  Marker LPSI: pelvis (-0.155 0.035 -0.045)
  Marker LHJC: femur_l (0 0 0) fixed=true
  Marker RHJC: femur_r (0 0 0) fixed=true
  Marker RTH1: femur_r (0.018 -0.15 0.064)
  Marker RTH2: femur_r (0.08 -0.23 0.0047)
  Marker RTH3: femur_r (0.01 -0.3 0.06)
  Marker RTH4: femur_r (0.01 -0.3 0.06)
  Marker RLFC: femur_r (0 -0.404 0.05)
  Marker RMFC: femur_r (0 -0.404 -0.05)
  Marker RKJC: tibia_r (-0.00808954 -0.0035348 -0.00148474) fixed=true
  Marker RTB1: tibia_r (-0.00166178 -0.156488 0.0492394)
  Marker RTB2: tibia_r (0.0369643 -0.230107 -0.00391699)
  Marker RTB3: tibia_r (0.0113793 -0.295236 0.0553541)
  Marker RTB4: tibia_r (0.0113793 -0.295236 0.0553541)
  Marker RLMAL: tibia_r (-0.005 -0.3888 0.053)
  Marker RMMAL: tibia_r (0.006 -0.3888 -0.038)
  Marker RAJC: talus_r (0 0 0) fixed=true
  Marker RCAL: calcn_r (-0.025 0.02 -0.005)
  Marker RTOE: calcn_r (0.182672 0.0231684 -0.0375725)
  Marker RMT5: calcn_r (0.135749 0.0175696 0.0511012)
  Marker LTH1: femur_l (0.018 -0.15 -0.064)
  Marker LTH2: femur_l (0.08 -0.23 -0.0047)
  Marker LTH3: femur_l (0.01 -0.3 -0.06)
  Marker LTH4: femur_l (0.01 -0.3 -0.06)
  Marker LLFC: femur_l (0 -0.404 -0.05)
  Marker LMFC: femur_l (0 -0.404 0.05)
  Marker LKJC: tibia_l (-0.00808954 -0.0035348 0.00148474) fixed=true
  Marker LTB1: tibia_l (-0.00166178 -0.156488 -0.0492394)
  Marker LTB2: tibia_l (0.0369643 -0.230107 0.00391699)
  Marker LTB3: tibia_l (0.0113793 -0.295236 -0.0553541)
  Marker LTB4: tibia_l (0.0113793 -0.295236 -0.0553541)
  Marker LLMAL: tibia_l (-0.005 -0.3888 -0.053)
  Marker LMMAL: tibia_l (0.006 -0.3888 0.038)
  Marker LAJC: talus_l (0 0 0) fixed=true
  Marker LCAL: calcn_l (-0.025 0.02 0.005)
  Marker LTOE: calcn_l (0.1826718 0.02316843 0.03757248)
  Marker LMT5: calcn_l (0.1357492 0.01756958 -0.05110116)
